# [plot: -x^2 vs x]
# Problem 1-1
f(x) := -x^2
d/dx(f(x)) → -(2*x)
# The function is NOT eventually nondecreasing
# Problem 1-2
# [plot: x^2 + 2*x + 1 vs x]
f(x) := x^2 + 2*x + 1
d/dx(f(x)) → 2*x + 2
# The function is eventually nondecreasing
#
# from the graph it started decreasing on (-∞,0) but eventually increasing on the [0, ∞)
#
# also observing the derivative, the slope of the tangent is -ve for -ve values of x and +ve for +ve values of x
# [plot: x^3 + x vs x]
# Problem 1-3
f(x) := x^3 + x
d/dx(f(x)) → 3*x^2 + 1
# The function is increasing (monotonous)
#
# from the graph and also from the derivative, the slope of the tangent is positive for all x belongs to ℝ
