# [plot: 2*x^2, x^2 + 1, 2*x^2 + 2 vs x]
# Problem 2-1
f(x) := 2*x^2
g(x) := x^2 + 1
d/dx(f(x)) → 4*x
d/dx(g(x)) → 2*x
# f(x) and g(x) grow at the same rate since there is a constant that can make the derivatives equal
# [plot: x^2, x^3 vs x]
# problem 2-2
f(x) := x^2
g(x) := x^3
d/dx(f(x)) → 2*x
d/dx(g(x)) → 3*x^2
# f(x) grows no faster than g(x)
# [plot: 4*x + 1, x^2 - 1 vs x]
# problem 2-3
f(x) := 4*x + 1
g(x) := x^2 - 1
d/dx(f(x)) → 4
d/dx(g(x)) → 2*x
# f(x) grows no faster than g(x)
